*Heading
** Job name: disc_press_mitad Model name: Disc_L4-L5
** Generated by: Abaqus/CAE 2020
*Preprint, echo=NO, model=NO, history=NO, contact=NO
**
** PARTS
**
*Part, name=L4-L5-1
*Node
      1,   18.7945099,   20.9243507,  -6.58317614
      2,   18.6198997,   20.8160801,  -7.73658323
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*Element, type=C3D20P
    1,      1,      7,      9,      3,      2,      8,     10,      4, 155694, 139373, 155693, 153131, 155695, 139375, 155696,
       153133, 153011, 139376, 139374, 153132
    2,      3,      9,     11,      5,      4,     10,     12,      6, 155693, 139377, 155697, 153134, 155696, 139379, 155698,
       153136, 153132, 139374, 139378, 153135
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*Element, type=SFM3D8
26497,      7,      9,     10,      8, 139373, 139374, 139375, 139376
26498,      9,     11,     12,     10, 139377, 139378, 139379, 139374
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*Elset, elset=CEP
 14209, 14210, 14211, 14212, 14213, 14214
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*Elset, elset=BEP
 19377, 19378, 19379, 19380, 19381, 19382
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*Elset, elset=AF, generate
    1,  5760,     1
*Elset, elset=AF-Z1
 5763, 5764, 5767, 5768, 5771, 5772
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*Elset, elset=AF-Z2
 5761, 5762, 5765, 5766, 5769, 5770
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*Elset, elset=NP-Z5
  7049,  7050,  7059,  7060,  7069,  7070
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*Elset, elset=NP-Z4
  7047,  7048,  7057,  7058,  7067,  7068
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*Elset, elset=NP-Z3
  7045,  7046,  7055,  7056,  7065,  7066
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*Elset, elset=NP-Z2
  7043,  7044,  7053,  7054,  7063,  7064
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*Elset, elset=NP-Z1
  7041,  7042,  7051,  7052,  7061,  7062
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*Elset, elset=NP, generate
 10241,  14208,      1
*Elset, elset=AF_REBARS, generate
 26497,  34176,      1
*Elset, elset=REBARS_AI
 26785, 26786, 26787, 26788, 26789, 26790
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*Elset, elset=REBARS_AO
 28705, 28706, 28707, 28708, 28709, 28710
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*Elset, elset=REBARS_PI
 26497, 26498, 26499, 26500, 26501, 26502
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*Elset, elset=REBARS_PO
 28417, 28418, 28419, 28420, 28421, 28422
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*Nset, nset=ND-BEP-M
    463,    465,    467,    501,    503,   1039
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*Nset, nset=ND-BEP-F
    104,    106,    108,    142,    144,    680
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*Nset, nset=ND-BEP
    104,    106,    108,    142,    144,    463
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*Nset, nset=ND-AF
      1,      2,      3,      4,      5,      6
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*Nset, nset=ND-NP
  34561,  34562,  34563,  34564,  34565,  34566
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*Nset, nset=ND-CEP
     74,     76,     78,     80,     82,     84
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*Nset, nset=ND-SURF_PP__PP_, internal
  23071,  23072,  23073,  23074,  23075,  23076
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*Elset, elset=_REBARS_S3_3, internal
  9001,  9002,  9011,  9012,  9021,  9022
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*Elset, elset=_REBARS_S4_3, internal
    1,    2,    3,    4,    5,    6
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*Elset, elset=_REBARS_S6_3, internal
 3925, 3926, 3927, 3928, 3929, 3930
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*Elset, elset=_REBARS_S5_3, internal
  8729,  8730,  8739,  8740,  8749,  8750
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*Surface, type=ELEMENT, name=REBARS
_REBARS_S3_3, S3
_REBARS_S4_3, S4
_REBARS_S6_3, S6
_REBARS_S5_3, S5
** Section: Section-1-AF
*Solid Section, elset=AF, material=AF
,
** Section: Section-2-AF-Z2
*Solid Section, elset=AF-Z2, material=AF
,
** Section: Section-3-AF-Z1
*Solid Section, elset=AF-Z1, material=AF
,
** Section: Section-8-NP-Z5
*Solid Section, elset=NP-Z5, material=NP
,
** Section: Section-7-NP-Z4
*Solid Section, elset=NP-Z4, material=NP
,
** Section: Section-6-NP-Z3
*Solid Section, elset=NP-Z3, material=NP
,
** Section: Section-5-NP-Z2
*Solid Section, elset=NP-Z2, material=NP
,
** Section: Section-4-NP-Z1
*Solid Section, elset=NP-Z1, material=NP
,
** Section: Section-9-NP
*Solid Section, elset=NP, material=NP
,
** Section: Section-10-CEP
*Solid Section, elset=CEP, material=CEP
,
** Section: Section-11-BEP
*Solid Section, elset=BEP, material=BEP
,
** Section: Section-12-REBARS_PI
*Orientation, name=localAF, definition=offset to nodes
4, 2, 3
3, 0.
*Surface Section, elset=REBARS_PI
*Rebar Layer, GEOMETRY=CONSTANT, orientation=localAF
REBS_43, 0.1, 0.25, , COLLAGEN, 43., 1
REBS_M43, 0.1, 0.25, , COLLAGEN, -43., 1
** Section: Section-13-REBARS_AI
*Surface Section, elset=REBARS_AI
*Rebar Layer, GEOMETRY=CONSTANT, orientation=localAF
REBS_31, 0.1, 0.25, , COLLAGEN, 31., 1
REBS_M31, 0.1, 0.25, , COLLAGEN, -31., 1
** Section: Section-14-REBARS_PO
*Surface Section, elset=REBARS_PO
*Rebar Layer, GEOMETRY=CONSTANT, orientation=localAF
REBS_28, 0.1, 0.25, , COLLAGEN, 28., 1
REBS_M28, 0.1, 0.25, , COLLAGEN, -28., 1
** Section: Section-15-REBARS_AO
*Surface Section, elset=REBARS_AO
*Rebar Layer, GEOMETRY=CONSTANT, orientation=localAF
REBS_23, 0.1, 0.25, , COLLAGEN, 23., 1
REBS_M23, 0.1, 0.25, , COLLAGEN, -23., 1
*End Part
**
**
** ASSEMBLY
**
*Assembly, name=Assembly
**
*Instance, name=L4-L5-1-1, part=L4-L5-1
*Nset, nset=ND-SURF_PP__PP__PP_, internal
  23071,  23072,  23073,  23074,  23075,  23076
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*End Instance
**
*Elset, elset=ALL_3DSOLID, instance=L4-L5-1-1, generate
 14209,  26496,      1
*Elset, elset=ALL_MASSIVE_ELEMENTS, instance=L4-L5-1-1, generate
 14209,  26496,      1
*Elset, elset=_Surf-1_S1, internal, instance=L4-L5-1-1
 22949, 22950, 22951, 22952, 22957, 22958
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*Elset, elset=_Surf-1_S2, internal, instance=L4-L5-1-1
 22945, 22946, 22947, 22948, 22953, 22954
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*Elset, elset=_Surf-1_S4, internal, instance=L4-L5-1-1
 25059, 25062, 25065, 25068, 25071, 25074
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*Elset, elset=_Surf-1_S1_1, internal, instance=L4-L5-1-1
 22949, 22950, 22951, 22952, 22957, 22958
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*Elset, elset=_Surf-1_S2_1, internal, instance=L4-L5-1-1
 22945, 22946, 22947, 22948, 22953, 22954
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*Elset, elset=_Surf-1_S4_1, internal, instance=L4-L5-1-1
 25059, 25062, 25065, 25068, 25071, 25074
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*Surface, type=ELEMENT, name=Surf-1
_Surf-1_S1_1, S1
_Surf-1_S2_1, S2
_Surf-1_S4_1, S4
*End Assembly
*Amplitude, name=AMP-1
             0.,              1.,          28790.,              1.
*Amplitude, name=AMP-2
             0.,              1.,          57590.,              1.
**
** MATERIALS
**
**********************************************
**  Annulus
**********************************************
*Material, name=AF
*Permeability,   DEPENDENCIES=1, specific=1.
 1e-08,,,1e-08
  100.,,,100
*User Defined Field
*Depvar
8,
*User Material, constants=6
*INCLUDE, INPUT=./components/annulus.inp
**********************************************
**  Annulus transition zones
**********************************************
*Material, name=AF-Z1
*Permeability,   DEPENDENCIES=1, specific=1.
 1e-08,,,1e-08
  100.,,,100
*User Defined Field
*Depvar
8,
*User Material, constants=6
*INCLUDE, INPUT=./components/annulus.inp
*Material, name=AF-Z2
*Permeability,   DEPENDENCIES=1, specific=1.
 1e-08,,,1e-08
  100.,,,100
*User Defined Field
*Depvar
8,
*User Material, constants=6
*INCLUDE, INPUT=./components/annulus.inp
**********************************************
**  Bony endplates
**********************************************
*Material, name=BEP
*Elastic
10000., 0.3
*Permeability, specific=1.
26800., 0.05
**********************************************
**  Cartilage endplates
**********************************************
*Material, name=CEP
*Permeability,   DEPENDENCIES=1, specific=1.
 1e-08,,,1e-08
  100.,,,100
*User Defined Field
*Depvar
8,
*User Material, constants=6
*INCLUDE, INPUT=./components/endplate.inp
**********************************************
**  Collagen
**********************************************
*Material, name=COLLAGEN
*Depvar
      1,
*User Material, constants=5
*INCLUDE, INPUT=./components/collagen.inp
**********************************************
**  Nucleus
**********************************************
*Material, name=NP
*Permeability,  DEPENDENCIES=1, specific=1.
 1e-08,,,1e-08
  100.,,,100
*User Defined Field
*Depvar
8,
*User Material, constants=6
*INCLUDE, INPUT=./components/nucleus.inp
**********************************************
**  Nucleus transition zones
**********************************************
*Material, name=NP-Z1
*Permeability,  DEPENDENCIES=1, specific=1.
 1e-08,,,1e-08
  100.,,,100
*User Defined Field
*Depvar
8,
*User Material, constants=6
*INCLUDE, INPUT=./components/nucleus.inp
*Material, name=NP-Z2
*Permeability,  DEPENDENCIES=1, specific=1.
 1e-08,,,1e-08
  100.,,,100
*User Defined Field
*Depvar
8,
*User Material, constants=6
*INCLUDE, INPUT=./components/nucleus.inp
*Material, name=NP-Z3
*Permeability,  DEPENDENCIES=1, specific=1.
 1e-08,,,1e-08
  100.,,,100
*User Defined Field
*Depvar
8,
*User Material, constants=6
*INCLUDE, INPUT=./components/nucleus.inp
*Material, name=NP-Z4
*Permeability,  DEPENDENCIES=1, specific=1.
 1e-08,,,1e-08
  100.,,,100
*User Defined Field
*Depvar
8,
*User Material, constants=6
*INCLUDE, INPUT=./components/nucleus.inp
*Material, name=NP-Z5
*Permeability,  DEPENDENCIES=1, specific=1.
 1e-08,,,1e-08
  100.,,,100
*User Defined Field
*Depvar
8,
*User Material, constants=6
*INCLUDE, INPUT=./components/nucleus.inp
**
** BOUNDARY CONDITIONS
**
** Name: BC-3 Type: Displacement/Rotation
*Boundary
L4-L5-1-1.ND-BEP-F, ENCASTRE
** Name: Por-BC-1 Type: Pore pressure
*Boundary
L4-L5-1-1.ND-SURF_PP__PP_, 8, 8
**
** PREDEFINED FIELDS
**
*INITIAL CONDITIONS, TYPE=FIELD, VARIABLE=1
*INCLUDE, INPUT=./components/kzero.inp
*INITIAL CONDITIONS, TYPE=FIELD, VARIABLE=2
*INCLUDE, INPUT=./components/emme.inp
*INITIAL CONDITIONS, TYPE=FIELD, VARIABLE=3
*INCLUDE, INPUT=./components/voidr.inp
*INITIAL CONDITIONS, TYPE=FIELD, VARIABLE=4
*INCLUDE, INPUT=./components/kzero.inp
*Initial Conditions, TYPE=RATIO
*include, input=./components/voidr.inp
** ----------------------------------------------------------------
**
** STEP: Swelling
**
*Step, name=Swelling, nlgeom=YES, inc=1000
Free swelling
*Soils, consolidation, end=PERIOD, utol=5.
2000., 61200., 2000., 61200.,
*include, input=./components/controls.inp
**
** OUTPUT REQUESTS
**
*Restart, write, frequency=0
**
** FIELD OUTPUT: F-Output-1
**
*Output, field
*Element Output, rebar, directions=YES
FLUVR, FLVEL, LE, RBANG, RBFOR, RBROT, S, VOIDR
**
** FIELD OUTPUT: F-Output-2
**
*Element Output, directions=YES
FLUVR, FLVEL, LE, S, VOIDR, SDV
**
** FIELD OUTPUT: F-Output-3
**
*Node Output
POR, RF, U, CF
**
** HISTORY OUTPUT: H-Output-1
**
*Output, history, variable=PRESELECT
*End Step
** ----------------------------------------------------------------
**
** STEP: Carga_noche
**
*Step, name=Carga_noche, nlgeom=YES, amplitude=RAMP, inc=1000
Load at rest time
*Soils, consolidation, end=PERIOD, utol=5.
2.5, 10.
**
** LOADS
**
** Name: Load-1   Type: Pressure
*Dsload, op=NEW
Surf-1, P, 0.11
*include, input=./components/controls.inp
** OUTPUT REQUESTS
**
*Restart, write, frequency=0
**
** FIELD OUTPUT: F-Output-1
**
*Output, field
*Element Output, rebar, directions=YES
FLUVR, FLVEL, LE, RBANG, RBFOR, RBROT, S, VOIDR
**
** FIELD OUTPUT: F-Output-2
**
*Element Output, directions=YES
FLUVR, FLVEL, LE, S, VOIDR, SDV
**
** FIELD OUTPUT: F-Output-3
**
*Node Output
POR, RF, U, CF
**
** HISTORY OUTPUT: H-Output-1
**
*Output, history, variable=PRESELECT
*End Step
** ----------------------------------------------------------------
**
** STEP: Creep_noche
**
*Step, name=Creep_noche, nlgeom=YES, inc=1000
*Soils, consolidation, end=PERIOD, utol=5.
5., 28790., 1., 28790.,
**
** LOADS
**
** Name: Load-2   Type: Pressure
*Dsload, op=NEW, amplitude=AMP-1
Surf-1, P, 0.11
*include, input=./components/controls.inp
**
** OUTPUT REQUESTS
**
*Restart, write, frequency=0
**
** FIELD OUTPUT: F-Output-1
**
*Output, field
*Element Output, rebar, directions=YES
FLUVR, FLVEL, LE, RBANG, RBFOR, RBROT, S, VOIDR
**
** FIELD OUTPUT: F-Output-2
**
*Element Output, directions=YES
FLUVR, FLVEL, LE, S, VOIDR, SDV
**
** FIELD OUTPUT: F-Output-3
**
*Node Output
POR, RF, U, CF
**
** HISTORY OUTPUT: H-Output-1
**
*Output, history, variable=PRESELECT
*End Step
** ----------------------------------------------------------------
**
** STEP: Carga_dia
**
*Step, name=Carga_dia, nlgeom=YES, amplitude=RAMP, inc=1000
*Soils, consolidation, end=PERIOD, utol=5.
0.1, 10.
**
** LOADS
**
** Name: Load-3   Type: Pressure
*Dsload, op=NEW
Surf-1, P, 0.54
**
** OUTPUT REQUESTS
**
*Restart, write, frequency=0
**
** FIELD OUTPUT: F-Output-1
**
*Output, field
*Element Output, rebar, directions=YES
FLUVR, FLVEL, LE, RBANG, RBFOR, RBROT, S, VOIDR
**
** FIELD OUTPUT: F-Output-2
**
*Element Output, directions=YES
FLUVR, FLVEL, LE, S, VOIDR, SDV
**
** FIELD OUTPUT: F-Output-3
**
*Node Output
POR, RF, U, CF
**
** HISTORY OUTPUT: H-Output-1
**
*Output, history, variable=PRESELECT
*End Step
** ----------------------------------------------------------------
**
** STEP: Creep_dia
**
*Step, name=Creep_dia, nlgeom=YES, inc=1000
*Soils, consolidation, end=PERIOD, utol=5.
2.5, 57590., 0.001, 57590.,
**
** LOADS
**
** Name: Load-4   Type: Pressure
*Dsload, op=NEW, amplitude=AMP-2
Surf-1, P, 0.54
**
** OUTPUT REQUESTS
**
*Restart, write, frequency=0
**
** FIELD OUTPUT: F-Output-1
**
*Output, field
*Element Output, rebar, directions=YES
FLUVR, FLVEL, LE, RBANG, RBFOR, RBROT, S, VOIDR
**
** FIELD OUTPUT: F-Output-2
**
*Element Output, directions=YES
FLUVR, FLVEL, LE, S, VOIDR, SDV
**
** FIELD OUTPUT: F-Output-3
**
*Node Output
POR, RF, U, CF
**
** HISTORY OUTPUT: H-Output-1
**
*Output, history, variable=PRESELECT
*End Step
