*Heading
** Job name: NPTemplate Model name: L4-L5
** Generated by: Abaqus/CAE 2019
*Preprint, echo=NO, model=NO, history=NO, contact=NO
**
** PARTS
**
*Part, name=PART-1
*Node
  34561,  -18.2532501,   21.5052795,  0.341551006
  34562,  -18.4126396,   21.5817509,   1.69871402
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*Element, type=C3D20P
 7041,  42241,  42247,  42249,  42243,  42242,  42248,  42250,  42244, 163616, 163615, 163614, 163613, 163617, 163618, 163619,
       163620, 163622, 163621, 163623, 163624
 7042,  42243,  42249,  42251,  42245,  42244,  42250,  42252,  42246, 163614, 163627, 163626, 163625, 163619, 163628, 163629,
       163630, 163624, 163623, 163631, 163632
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*Elset, elset=NP-Z5
  7049,  7050,  7059,  7060,  7069,  7070
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*Elset, elset=NP-Z4
  7047,  7048,  7057,  7058,  7067,  7068
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*Elset, elset=NP-Z3
  7045,  7046,  7055,  7056,  7065,  7066
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*Elset, elset=NP-Z2
  7043,  7044,  7053,  7054,  7063,  7064
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*Elset, elset=NP-Z1
  7041,  7042,  7051,  7052,  7061,  7062
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*Elset, elset=NP, generate
 10241,  14208,      1
*Nset, nset=ND-AF
  34561,  34562,  34563,  34564,  34565,  34566
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*Nset, nset=ND-NP
  34561,  34562,  34563,  34564,  34565,  34566
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*Nset, nset=ND-CEP
  34562,  34564,  34566,  34588,  34590,  34609
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*Elset, elset=_REBARS_S3_4, internal
  9001,  9002,  9011,  9012,  9021,  9022
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*Elset, elset=_REBARS_S4_4, internal
 7049, 7050, 7059, 7060, 7069, 7070
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*Elset, elset=_REBARS_S6_4, internal
 7081, 7082, 7091, 7092, 7101, 7102
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*Elset, elset=_REBARS_S5_4, internal
  8729,  8730,  8739,  8740,  8749,  8750
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*Surface, type=ELEMENT, name=REBARS
_REBARS_S3_4, S3
_REBARS_S4_4, S4
_REBARS_S6_4, S6
_REBARS_S5_4, S5
** Section: Section-4-NP-Z1
*Solid Section, elset=NP-Z1, material=NP
,
** Section: Section-5-NP-Z2
*Solid Section, elset=NP-Z2, material=NP
,
** Section: Section-6-NP-Z3
*Solid Section, elset=NP-Z3, material=NP
,
** Section: Section-7-NP-Z4
*Solid Section, elset=NP-Z4, material=NP
,
** Section: Section-8-NP-Z5
*Solid Section, elset=NP-Z5, material=NP
,
** Section: Section-9-NP
*Solid Section, elset=NP, material=NP
,
*End Part
**
**
** ASSEMBLY
**
*Assembly, name=Assembly
**
*Instance, name=PART-1-1, part=PART-1
*End Instance
**
*End Assembly
*Amplitude, name=AMP-1
             0.,              1.,          28790.,              1.
*Amplitude, name=AMP-2
             0.,              1.,          57590.,              1.
**
** MATERIALS
**
*Material, name=AF
*Depvar
      8,
*User Defined Field
*User Material, constants=6
 0.84, 0.704,  0.15,  0.18,  0.65,    0.
*Material, name=AF-Z1
*Depvar
      8,
*User Defined Field
*User Material, constants=6
 0.84, 0.704,  0.15,  0.18,  0.65,    0.
*Material, name=AF-Z2
*Depvar
      8,
*User Defined Field
*User Material, constants=6
 0.84, 0.704,  0.15,  0.18,  0.65,    0.
*Material, name=BEP
*Elastic
10000., 0.3
*Permeability, specific=1.
26800., 0.05
*Material, name=CEP
*Depvar
      2,
*Elastic
20., 0.17
*User Defined Field
*Material, name=COLLAGEN
*Depvar
      1,
*User Material, constants=5
4000., 2.8, 11., 6.1,  8.
*Material, name=NP
*Depvar
      8,
*User Defined Field
*User Material, constants=6
1., 0.745,  0.15,  0.29,  0.15,    0.
*Material, name=NP-Z1
*Depvar
      8,
*User Defined Field
*User Material, constants=6
1., 0.745,  0.15,  0.29,  0.15,    0.
*Material, name=NP-Z2
*Depvar
      8,
*User Defined Field
*User Material, constants=6
1., 0.745,  0.15,  0.29,  0.15,    0.
*Material, name=NP-Z3
*Depvar
      8,
*User Defined Field
*User Material, constants=6
1., 0.745,  0.15,  0.29,  0.15,    0.
*Material, name=NP-Z4
*Depvar
      8,
*User Defined Field
*User Material, constants=6
1., 0.745,  0.15,  0.29,  0.15,    0.
*Material, name=NP-Z5
*Depvar
      8,
*User Defined Field
*User Material, constants=6
1., 0.745,  0.15,  0.29,  0.15,    0.
**
** BOUNDARY CONDITIONS
**
** Name: Disp-BC-1 Type: Symmetry/Antisymmetry/Encastre
*Boundary
PART-1-1.ND-BEP-F, ENCASTRE
** Name: Por-BC-1 Type: Pore pressure
*Boundary
PART-1-1.ND-SURF_PP__PP__PP__PP_, 8, 8
**
** PREDEFINED FIELDS
**
** Name: Field-1   Type: Field
*Initial Conditions, type=FIELD, variable=1
PART-1-1.ND-CEP, 0.0025
** Name: Field-2   Type: Field
*Initial Conditions, type=FIELD, variable=1
PART-1-1.ND-AF, 0.00016
** Name: Field-3   Type: Field
*Initial Conditions, type=FIELD, variable=1
PART-1-1.ND-NP, 0.00016
** Name: Field-4   Type: Field
*Initial Conditions, type=FIELD, variable=2
PART-1-1.ND-CEP, 8.5
** Name: Field-5   Type: Field
*Initial Conditions, type=FIELD, variable=2
PART-1-1.ND-AF, 1.2
** Name: Field-6   Type: Field
*Initial Conditions, type=FIELD, variable=2
PART-1-1.ND-NP, 1.2
** Name: Field-7   Type: Field
*Initial Conditions, type=FIELD, variable=3
PART-1-1.ND-CEP, 4.
** Name: Field-8   Type: Field
*Initial Conditions, type=FIELD, variable=3
PART-1-1.ND-AF, 3.
** Name: Field-9   Type: Field
*Initial Conditions, type=FIELD, variable=3
PART-1-1.ND-NP, 4.
** Name: Field-10   Type: Field
*Initial Conditions, type=FIELD, variable=3
PART-1-1.ND-BEP, 0.05
** Name: Field-11   Type: Field
*Initial Conditions, type=FIELD, variable=4
PART-1-1.ND-CEP, 0.0025
** Name: Field-12   Type: Field
*Initial Conditions, type=FIELD, variable=4
PART-1-1.ND-AF, 0.00016
** Name: Field-13   Type: Field
*Initial Conditions, type=FIELD, variable=4
PART-1-1.ND-NP, 0.00016
** Name: IC-1   Type: Void ratio
*Initial Conditions, TYPE=RATIO
PART-1-1.ND-CEP, 4.
** Name: IC-2   Type: Void ratio
*Initial Conditions, TYPE=RATIO
PART-1-1.ND-AF, 3.
** Name: IC-3   Type: Void ratio
*Initial Conditions, TYPE=RATIO
PART-1-1.ND-NP, 4.
** Name: IC-4   Type: Void ratio
*Initial Conditions, TYPE=RATIO
PART-1-1.ND-BEP, 0.05
** ----------------------------------------------------------------
**
** STEP: Swelling
**
*Step, name=Swelling, nlgeom=YES, inc=1000
Free swelling
*Soils, consolidation, end=PERIOD, utol=5.
2000., 61200., 2000., 61200.,
**
** CONTROLS
**
*Controls, reset
*Controls, analysis=discontinuous
*Controls, parameters=line search
4, 4., 0.05, , 0.15
*Controls, parameters=field, field=displacement
0.075, 0.075, , , , , ,
*Controls, parameters=field, field=hydrostatic fluid pressure
0.075, 0.075, , , , , ,
*Controls, parameters=field, field=rotation
0.075, 0.075, , , , , ,
*Controls, parameters=field, field=pore fluid pressure
0.075, 0.075, , , , , ,
**
** OUTPUT REQUESTS
**
*Restart, write, frequency=0
**
** FIELD OUTPUT: F-Output-1
**
*Output, field
*Node Output
CF, POR, RF, U
**
** FIELD OUTPUT: F-Output-2
**
*Element Output, rebar, directions=YES
FLUVR, FLVEL, LE, RBANG, RBFOR, RBROT, S, VOIDR
**
** FIELD OUTPUT: F-Output-3
**
*Element Output, directions=YES
FLUVR, FLVEL, LE, S, SDV, VOIDR
**
** HISTORY OUTPUT: H-Output-1
**
*Output, history, variable=PRESELECT
*End Step
** ----------------------------------------------------------------
**
** STEP: Carga_noche
**
*Step, name=Carga_noche, nlgeom=YES, amplitude=RAMP, inc=1000
Load at rest time
*Soils, consolidation, end=PERIOD, utol=5.
2.5, 10., 0.0001, 10.,
**
** LOADS
**
** Name: SURFFORCE-1   Type: Pressure
*Dsload, op=NEW
SURF-1, P, 0.11
**
** CONTROLS
**
*Controls, reset
*Controls, analysis=discontinuous
*Controls, parameters=line search
4, 4., 0.05, , 0.15
*Controls, parameters=field, field=displacement
0.075, 0.075, , , , , ,
*Controls, parameters=field, field=hydrostatic fluid pressure
0.075, 0.075, , , , , ,
*Controls, parameters=field, field=rotation
0.075, 0.075, , , , , ,
*Controls, parameters=field, field=pore fluid pressure
0.075, 0.075, , , , , ,
**
** OUTPUT REQUESTS
**
*Restart, write, frequency=0
**
** FIELD OUTPUT: F-Output-4
**
*Output, field
*Node Output
CF, POR, RF, U
**
** FIELD OUTPUT: F-Output-5
**
*Element Output, rebar, directions=YES
FLUVR, FLVEL, LE, RBANG, RBFOR, RBROT, S, VOIDR
**
** FIELD OUTPUT: F-Output-6
**
*Element Output, directions=YES
FLUVR, FLVEL, LE, S, SDV, VOIDR
**
** HISTORY OUTPUT: H-Output-2
**
*Output, history, variable=PRESELECT
*End Step
** ----------------------------------------------------------------
**
** STEP: Creep_noche
**
*Step, name=Creep_noche, nlgeom=YES, inc=1000
*Soils, consolidation, end=PERIOD, utol=5.
5., 28790., 1., 28790.,
**
** LOADS
**
** Name: SURFFORCE-1   Type: Pressure
*Dsload, op=NEW
** Name: SURFFORCE-2   Type: Pressure
*Dsload, op=NEW, amplitude=AMP-1
SURF-1, P, 0.11
**
** CONTROLS
**
*Controls, reset
*Controls, analysis=discontinuous
*Controls, parameters=line search
4, 4., 0.05, , 0.15
*Controls, parameters=field, field=displacement
0.075, 0.075, , , , , ,
*Controls, parameters=field, field=hydrostatic fluid pressure
0.075, 0.075, , , , , ,
*Controls, parameters=field, field=rotation
0.075, 0.075, , , , , ,
*Controls, parameters=field, field=pore fluid pressure
0.075, 0.075, , , , , ,
**
** OUTPUT REQUESTS
**
*Restart, write, frequency=0
**
** FIELD OUTPUT: F-Output-7
**
*Output, field
*Node Output
CF, POR, RF, U
**
** FIELD OUTPUT: F-Output-8
**
*Element Output, directions=YES
FLUVR, FLVEL, LE, S, SDV, VOIDR
**
** HISTORY OUTPUT: H-Output-3
**
*Output, history, variable=PRESELECT
*End Step
** ----------------------------------------------------------------
**
** STEP: Carga_dia
**
*Step, name=Carga_dia, nlgeom=YES, amplitude=RAMP, inc=1000
*Soils, consolidation, end=PERIOD, utol=5.
0.1, 10., 0.0001, 10.,
**
** LOADS
**
** Name: SURFFORCE-2   Type: Pressure
*Dsload, op=NEW
** Name: SURFFORCE-3   Type: Pressure
*Dsload, op=NEW
SURF-1, P, 0.54
**
** OUTPUT REQUESTS
**
*Restart, write, frequency=0
**
** FIELD OUTPUT: F-Output-9
**
*Output, field
*Node Output
CF, POR, RF, U
**
** FIELD OUTPUT: F-Output-10
**
*Element Output, rebar, directions=YES
FLUVR, FLVEL, LE, RBANG, RBFOR, RBROT, S, VOIDR
**
** FIELD OUTPUT: F-Output-11
**
*Element Output, directions=YES
FLUVR, FLVEL, LE, S, SDV, VOIDR
**
** HISTORY OUTPUT: H-Output-4
**
*Output, history, variable=PRESELECT
*End Step
** ----------------------------------------------------------------
**
** STEP: Creep_dia
**
*Step, name=Creep_dia, nlgeom=YES, inc=1000
*Soils, consolidation, end=PERIOD, utol=5.
5., 57590., 0.001, 57590.,
**
** LOADS
**
** Name: SURFFORCE-3   Type: Pressure
*Dsload, op=NEW
** Name: SURFFORCE-4   Type: Pressure
*Dsload, op=NEW, amplitude=AMP-2
SURF-1, P, 0.54
**
** OUTPUT REQUESTS
**
*Restart, write, frequency=0
**
** FIELD OUTPUT: F-Output-12
**
*Output, field
*Node Output
CF, POR, RF, U
**
** FIELD OUTPUT: F-Output-13
**
*Element Output, rebar, directions=YES
FLUVR, FLVEL, LE, RBANG, RBFOR, RBROT, S, VOIDR
**
** FIELD OUTPUT: F-Output-14
**
*Element Output, directions=YES
FLUVR, FLVEL, LE, S, SDV, VOIDR
**
** HISTORY OUTPUT: H-Output-5
**
*Output, history, variable=PRESELECT
*End Step
