*Heading
** Job name: templateCEPlower Model name: L4-L5_shell
** Generated by: Abaqus/CAE 2020
*Preprint, echo=NO, model=NO, history=NO, contact=NO
**
** PARTS
**
*Part, name=L4-L5-1
*Node
     74,   18.4473209,  -3.22484016,  -5.13032913
     76,   18.3727093,  -4.26329994,  -5.03588343
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*Element, type=C3D20P
16793,   8178,   8184,   8722,   8716,  93554,  93560,  93562,  93556, 157263, 142494, 157364, 153698, 193855, 193856, 193857,
       193858, 193860, 193859, 193861, 193862
16794,   8716,   8722,   8724,   8718,  93556,  93562,  93564,  93558, 157364, 142496, 157365, 153700, 193857, 193863, 193864,
       193865, 193862, 193861, 193866, 193867
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*Elset, elset=CEP
 16793, 16794, 16795, 16796, 16797, 16798
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*Nset, nset=ND-AF
     74,     76,     78,     80,     82,     84
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*Nset, nset=ND-NP
  34609,  34611,  34613,  34635,  34637,  34945
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*Nset, nset=ND-CEP
     74,     76,     78,     80,     82,     84
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*Nset, nset=ND-BEP
    104,    106,    108,    142,    144,    680
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*Nset, nset=ND-BEP-F
    104,    106,    108,    142,    144,    680
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*Nset, nset=ND-SURF_PP__PP__PP_, internal
    104,    106,    108,    142,    144,    680
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** Section: Section-10-CEP
*Solid Section, elset=CEP, material=CEP
,
*End Part
**
**
** ASSEMBLY
**
*Assembly, name=Assembly
**
*Instance, name=L4-L5-1-1, part=L4-L5-1
*End Instance
**
*Elset, elset=ALL_3DSOLID, instance=L4-L5-1-1
 16793, 16794, 16795, 16796, 16797, 16798
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*Elset, elset=ALL_MASSIVE_ELEMENTS, instance=L4-L5-1-1
 16793, 16794, 16795, 16796, 16797, 16798
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*End Assembly
*Amplitude, name=AMP-1
             0.,              1.,          28790.,              1.
*Amplitude, name=AMP-2
             0.,              1.,          57590.,              1.
**
** MATERIALS
**
** ********************************************
**   Annulus
** ********************************************
*Material, name=AF
*Depvar
      8,
*User Defined Field
*User Material, constants=6
 0.84, 0.704,  0.15,  0.18,  0.65,    0.
*Material, name=AF-Z1
*Depvar
      8,
*User Defined Field
*User Material, constants=6
 0.84, 0.704,  0.15,  0.18,  0.65,    0.
*Material, name=AF-Z2
*Depvar
      8,
*User Defined Field
*User Material, constants=6
 0.84, 0.704,  0.15,  0.18,  0.65,    0.
*Material, name=BEP
*Elastic
10000., 0.3
*Permeability, specific=1.
26800., 0.05
** ********************************************
**   Cartilage endplates
** ********************************************
*Material, name=CEP
*Depvar
      8,
*User Defined Field
*User Material, constants=6
1., 0.589,  0.15, 0.166,  0.24,    0.
*Material, name=COLLAGEN
*Depvar
      1,
*User Material, constants=5
4000., 2.8, 11., 6.1,  8.
*Material, name=NP
*Depvar
      8,
*User Defined Field
*User Material, constants=6
1., 0.745,  0.15,  0.29,  0.15,    0.
*Material, name=NP-Z1
*Depvar
      8,
*User Defined Field
*User Material, constants=6
1., 0.745,  0.15,  0.29,  0.15,    0.
*Material, name=NP-Z2
*Depvar
      8,
*User Defined Field
*User Material, constants=6
1., 0.745,  0.15,  0.29,  0.15,    0.
*Material, name=NP-Z3
*Depvar
      8,
*User Defined Field
*User Material, constants=6
1., 0.745,  0.15,  0.29,  0.15,    0.
*Material, name=NP-Z4
*Depvar
      8,
*User Defined Field
*User Material, constants=6
1., 0.745,  0.15,  0.29,  0.15,    0.
*Material, name=NP-Z5
*Depvar
      8,
*User Defined Field
*User Material, constants=6
1., 0.745,  0.15,  0.29,  0.15,    0.
**
** PREDEFINED FIELDS
**
** Name: Field-1   Type: Field
*Initial Conditions, type=FIELD, variable=1
L4-L5-1-1.ND-CEP, 0.017
** Name: Field-2   Type: Field
*Initial Conditions, type=FIELD, variable=1
L4-L5-1-1.ND-AF, 0.00016
** Name: Field-3   Type: Field
*Initial Conditions, type=FIELD, variable=1
L4-L5-1-1.ND-NP, 0.00016
** Name: Field-4   Type: Field
*Initial Conditions, type=FIELD, variable=2
L4-L5-1-1.ND-CEP, 1.2
** Name: Field-5   Type: Field
*Initial Conditions, type=FIELD, variable=2
L4-L5-1-1.ND-AF, 1.2
** Name: Field-6   Type: Field
*Initial Conditions, type=FIELD, variable=2
L4-L5-1-1.ND-NP, 1.2
** Name: Field-7   Type: Field
*Initial Conditions, type=FIELD, variable=3
L4-L5-1-1.ND-CEP, 1.94
** Name: Field-8   Type: Field
*Initial Conditions, type=FIELD, variable=3
L4-L5-1-1.ND-AF, 3.
** Name: Field-9   Type: Field
*Initial Conditions, type=FIELD, variable=3
L4-L5-1-1.ND-NP, 4.
** Name: Field-10   Type: Field
*Initial Conditions, type=FIELD, variable=4
L4-L5-1-1.ND-CEP, 0.017
** Name: Field-11   Type: Field
*Initial Conditions, type=FIELD, variable=4
L4-L5-1-1.ND-AF, 0.00016
** Name: Field-12   Type: Field
*Initial Conditions, type=FIELD, variable=4
L4-L5-1-1.ND-NP, 0.00016
** Name: IC-1   Type: Void ratio
*Initial Conditions, TYPE=RATIO
L4-L5-1-1.ND-CEP, 1.94
** Name: IC-2   Type: Void ratio
*Initial Conditions, TYPE=RATIO
L4-L5-1-1.ND-AF, 3.
** Name: IC-3   Type: Void ratio
*Initial Conditions, TYPE=RATIO
L4-L5-1-1.ND-NP, 4.
** ----------------------------------------------------------------
**
** STEP: Swelling
**
*Step, name=Swelling, nlgeom=YES, inc=1000
Free swelling
*Soils, consolidation, end=PERIOD, utol=5.
2000., 61200., 2000., 61200.,
**
** CONTROLS
**
*Controls, reset
*Controls, analysis=discontinuous
*Controls, parameters=line search
4, 4., 0.05, , 0.15
*Controls, parameters=field, field=displacement
0.075, 0.075, , , , , ,
*Controls, parameters=field, field=hydrostatic fluid pressure
0.075, 0.075, , , , , ,
*Controls, parameters=field, field=rotation
0.075, 0.075, , , , , ,
*Controls, parameters=field, field=pore fluid pressure
0.075, 0.075, , , , , ,
**
** OUTPUT REQUESTS
**
*Restart, write, overlay, frequency=1
**
** FIELD OUTPUT: F-Output-3
**
*Output, field
*Node Output
CF, POR, RF, U
**
** FIELD OUTPUT: F-Output-1
**
*Element Output, rebar, directions=YES
FLUVR, FLVEL, LE, RBANG, RBFOR, RBROT, S, VOIDR
**
** FIELD OUTPUT: F-Output-2
**
*Element Output, directions=YES
FLUVR, FLVEL, LE, S, SDV, VOIDR
**
** HISTORY OUTPUT: H-Output-1
**
*Output, history, variable=PRESELECT
*End Step
** ----------------------------------------------------------------
**
** STEP: Carga_noche
**
*Step, name=Carga_noche, nlgeom=YES, amplitude=RAMP, inc=1000
Load at rest time
*Soils, consolidation, end=PERIOD, utol=5.
2.5, 10., 0.0001, 10.,
**
** CONTROLS
**
*Controls, reset
*Controls, analysis=discontinuous
*Controls, parameters=line search
4, 4., 0.05, , 0.15
*Controls, parameters=field, field=displacement
0.075, 0.075, , , , , ,
*Controls, parameters=field, field=hydrostatic fluid pressure
0.075, 0.075, , , , , ,
*Controls, parameters=field, field=rotation
0.075, 0.075, , , , , ,
*Controls, parameters=field, field=pore fluid pressure
0.075, 0.075, , , , , ,
**
** OUTPUT REQUESTS
**
*Restart, write, overlay, frequency=1
**
** FIELD OUTPUT: F-Output-6
**
*Output, field
*Node Output
CF, POR, RF, U
**
** FIELD OUTPUT: F-Output-4
**
*Element Output, rebar, directions=YES
FLUVR, FLVEL, LE, RBANG, RBFOR, RBROT, S, VOIDR
**
** FIELD OUTPUT: F-Output-5
**
*Element Output, directions=YES
FLUVR, FLVEL, LE, S, SDV, VOIDR
**
** HISTORY OUTPUT: H-Output-2
**
*Output, history, variable=PRESELECT
*End Step
** ----------------------------------------------------------------
**
** STEP: Creep_noche
**
*Step, name=Creep_noche, nlgeom=YES, inc=1000
*Soils, consolidation, end=PERIOD, utol=5.
5., 28790., 1., 28790.,
**
** CONTROLS
**
*Controls, reset
*Controls, analysis=discontinuous
*Controls, parameters=line search
4, 4., 0.05, , 0.15
*Controls, parameters=field, field=displacement
0.075, 0.075, , , , , ,
*Controls, parameters=field, field=hydrostatic fluid pressure
0.075, 0.075, , , , , ,
*Controls, parameters=field, field=rotation
0.075, 0.075, , , , , ,
*Controls, parameters=field, field=pore fluid pressure
0.075, 0.075, , , , , ,
**
** OUTPUT REQUESTS
**
*Restart, write, overlay, frequency=1
**
** FIELD OUTPUT: F-Output-8
**
*Output, field
*Node Output
CF, POR, RF, U
**
** FIELD OUTPUT: F-Output-7
**
*Element Output, directions=YES
FLUVR, FLVEL, LE, S, SDV, VOIDR
**
** HISTORY OUTPUT: H-Output-3
**
*Output, history, variable=PRESELECT
*End Step
** ----------------------------------------------------------------
**
** STEP: Carga_dia
**
*Step, name=Carga_dia, nlgeom=YES, amplitude=RAMP, inc=1000
*Soils, consolidation, end=PERIOD, utol=5.
0.1, 10., 0.0001, 10.,
**
** OUTPUT REQUESTS
**
*Restart, write, overlay, frequency=1
**
** FIELD OUTPUT: F-Output-11
**
*Output, field
*Node Output
CF, POR, RF, U
**
** FIELD OUTPUT: F-Output-9
**
*Element Output, rebar, directions=YES
FLUVR, FLVEL, LE, RBANG, RBFOR, RBROT, S, VOIDR
**
** FIELD OUTPUT: F-Output-10
**
*Element Output, directions=YES
FLUVR, FLVEL, LE, S, SDV, VOIDR
**
** HISTORY OUTPUT: H-Output-4
**
*Output, history, variable=PRESELECT
*End Step
** ----------------------------------------------------------------
**
** STEP: Creep_dia
**
*Step, name=Creep_dia, nlgeom=YES, inc=1000
*Soils, consolidation, end=PERIOD, utol=5.
2.5, 57590., 0.001, 57590.,
**
** OUTPUT REQUESTS
**
*Restart, write, overlay, frequency=1
**
** FIELD OUTPUT: F-Output-14
**
*Output, field
*Node Output
CF, POR, RF, U
**
** FIELD OUTPUT: F-Output-12
**
*Element Output, rebar, directions=YES
FLUVR, FLVEL, LE, RBANG, RBFOR, RBROT, S, VOIDR
**
** FIELD OUTPUT: F-Output-13
**
*Element Output, directions=YES
FLUVR, FLVEL, LE, S, SDV, VOIDR
**
** HISTORY OUTPUT: H-Output-5
**
*Output, history, variable=PRESELECT
*End Step
