**
**  ___  ___  ________     ___    ___ ___  ___  ________     ___    ___ ___    ___  _______  ________
** |\  \|\  \|\   __  \   |\  \  /  /|\  \|\  \|\   __  \   |\  \  /  /|\  \  /  /|/  ___  \|\_____  \
** \ \  \\\  \ \  \|\  \  \ \  \/  / | \  \\\  \ \  \|\  \  \ \  \/  / | \  \/  / /__/|_/  /\|____|\ /_
**  \ \   __  \ \   __  \  \ \    / / \ \   __  \ \   __  \  \ \    / / \ \    / /|__|//  / /     \|\  \
**   \ \  \ \  \ \  \ \  \  /     \/   \ \  \ \  \ \  \ \  \  /     \/   /     \/     /  /_/__   __\_\  \
**    \ \__\ \__\ \__\ \__\/  /\   \    \ \__\ \__\ \__\ \__\/  /\   \  /  /\   \    |\________\|\_______\
**     \|__|\|__|\|__|\|__/__/ /\ __\    \|__|\|__|\|__|\|__/__/ /\ __\/__/ /\ __\    \|_______|\|_______|
**                        |__|/ \|__|                       |__|/ \|__||__|/ \|__|
**          01001000 01100001 01111000 01001000 01100001 01111000 01111000 00110010 00110011
**
**
****************************************************************************
******    ABAQUS SUBROUTINE                                           ******
******                                                                ******
******    Osmo-Poro-Hyper-Viscoelastic Model for the IVD              ******
******    Type: User MATerial (UMAT)                                  ******
******                                                                ******
******    Auth: Jérôme Noailly                                        ******
******    Updates:                                                    ******
******    - Adrea Malandrino                                          ******
******    - Carlos Ruiz                                               ******
******    - Estefano Muñoz-Moya, 05/08/2024                           ******
******      Adaptation to be compatible with mechano-transport model  ******
******                                                                ******
******    Linktree: https://linktr.ee/estefano23                      ******
******    Web Page: https://estefano23.github.io/                     ******
******    GitHub: estefano23                                          ******
******    Email: estefano.munoz.moya@gmail.com                        ******
******    HaxHaxx23                                                   ******
******    01001000 01100001 01111000                                  ******
******    01001000 01100001 01111000 01111000                         ******
******    00110010 00110011                                           ******
****************************************************************************
**
************************************************************************
************************************************************************
**
*HEADING
Osmo-Poro-Hyper-Viscoelastic_IVD_Estefano_Munoz-Moya
**
** Job name: GENERIC_L4L5 Model name: GENERIC_L4L5
** Generated by: Abaqus/CAE 2020
**
*PREPRINT, ECHO=NO, MODEL=NO, CONTACT=NO, HISTORY=NO
**
************************************************************************
** PARTS
************************************************************************
**
*PART, NAME=L4-L5-1
**
************************************************************************
** NODES
************************************************************************
**
*NODE
*Element, type=C3D20P
   1,      1,      7,      9,      3,      2,      8,     10,      4, 155694, 139373, 155693, 153131, 155695, 139375, 155696,
      153133, 153011, 139376, 139374, 153132
   2,      3,      9,     11,      5,      4,     10,     12,      6, 155693, 139377, 155697, 153134, 155696, 139379, 155698,
      153136, 153132, 139374, 139378, 153135
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*Element, type=SFM3D8
26497,      7,      9,     10,      8, 139373, 139374, 139375, 139376
26498,      9,     11,     12,     10, 139377, 139378, 139379, 139374
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*Nset, nset=PART-1-REFPT_, internal
 223169,
*Elset, elset=AF, generate
    1,  5760,     1
*Elset, elset=AF-Z1
 5763, 5764, 5767, 5768, 5771, 5772
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*Elset, elset=AF-Z2
 5761, 5762, 5765, 5766, 5769, 5770
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*Elset, elset=AF_REBARS, generate
 26497,  34176,      1
*Elset, elset=REBARS_AI
 26785, 26786, 26787, 26788, 26789, 26790
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*Elset, elset=REBARS_AO
 28705, 28706, 28707, 28708, 28709, 28710
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*Elset, elset=REBARS_PI
 26497, 26498, 26499, 26500, 26501, 26502
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*Elset, elset=REBARS_PO
 28417, 28418, 28419, 28420, 28421, 28422
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*Nset, nset=ND-BEP-M
    463,    465,    467,    501,    503,   1039
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*Nset, nset=ND-BEP-F
    104,    106,    108,    142,    144,    680
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*Nset, nset=ND-BEP
    104,    106,    108,    142,    144,    463
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*Nset, nset=ND-AF
      1,      2,      3,      4,      5,      6
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*Nset, nset=ND-NP
  34561,  34562,  34563,  34564,  34565,  34566
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*Nset, nset=ND-CEP
     74,     76,     78,     80,     82,     84
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*Elset, elset=_REBARS_S4_4, internal
    1,    2,    3,    4,    5,    6
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*Elset, elset=_REBARS_S6_4, internal
 3925, 3926, 3927, 3928, 3929, 3930
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*Surface, type=ELEMENT, name=REBARS
_REBARS_S4_4, S4
_REBARS_S6_4, S6
** Section: Section-1-AF
*Solid Section, elset=AF, material=AF
,
** Section: Section-2-AF-Z2
*Solid Section, elset=AF-Z2, material=AF
,
** Section: Section-3-AF-Z1
*Solid Section, elset=AF-Z1, material=AF
,
** Section: Section-12-REBARS_PI
*Surface Section, elset=REBARS_PI
*Rebar Layer
REBS_43, 0.1, 0.25, , COLLAGEN, 43., 1
REBS_M43, 0.1, 0.25, , COLLAGEN, -43., 1
** Section: Section-13-REBARS_AI
*Surface Section, elset=REBARS_AI
*Rebar Layer
REBS_31, 0.1, 0.25, , COLLAGEN, 31., 1
REBS_M31, 0.1, 0.25, , COLLAGEN, -31., 1
** Section: Section-14-REBARS_PO
*Surface Section, elset=REBARS_PO
*Rebar Layer
REBS_28, 0.1, 0.25, , COLLAGEN, 28., 1
REBS_M28, 0.1, 0.25, , COLLAGEN, -28., 1
** Section: Section-15-REBARS_AO
*Surface Section, elset=REBARS_AO
*Rebar Layer
REBS_23, 0.1, 0.25, , COLLAGEN, 23., 1
REBS_M23, 0.1, 0.25, , COLLAGEN, -23., 1
*End Part
**
**
** ASSEMBLY
**
*Assembly, name=Assembly
**
*Instance, name=PART-1-1, part=PART-1
*Nset, nset=ND-SURF_PP__PP__PP__PP_, internal
  23071,  23072,  23073,  23074,  23075,  23076
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*End Instance
**
*End Assembly
*Amplitude, name=AMP-1
             0.,              1.,          28790.,              1.
*Amplitude, name=AMP-2
             0.,              1.,          57590.,              1.
**
** MATERIALS
**
*Material, name=AF
*Depvar
      8,
*User Defined Field
*User Material, constants=6
 0.84, 0.704,  0.15,  0.18,  0.65,    0.
*Material, name=AF-Z1
*Depvar
      8,
*User Defined Field
*User Material, constants=6
 0.84, 0.704,  0.15,  0.18,  0.65,    0.
*Material, name=AF-Z2
*Depvar
      8,
*User Defined Field
*User Material, constants=6
 0.84, 0.704,  0.15,  0.18,  0.65,    0.
*Material, name=BEP
*Elastic
10000., 0.3
*Permeability, specific=1.
26800., 0.05
*Material, name=CEP
*Depvar
      2,
*Elastic
20., 0.17
*User Defined Field
*Material, name=COLLAGEN
*Depvar
      1,
*User Material, constants=5
4000., 2.8, 11., 6.1,  8.
*Material, name=NP
*Depvar
      8,
*User Defined Field
*User Material, constants=6
1., 0.745,  0.15,  0.29,  0.15,    0.
*Material, name=NP-Z1
*Depvar
      8,
*User Defined Field
*User Material, constants=6
1., 0.745,  0.15,  0.29,  0.15,    0.
*Material, name=NP-Z2
*Depvar
      8,
*User Defined Field
*User Material, constants=6
1., 0.745,  0.15,  0.29,  0.15,    0.
*Material, name=NP-Z3
*Depvar
      8,
*User Defined Field
*User Material, constants=6
1., 0.745,  0.15,  0.29,  0.15,    0.
*Material, name=NP-Z4
*Depvar
      8,
*User Defined Field
*User Material, constants=6
1., 0.745,  0.15,  0.29,  0.15,    0.
*Material, name=NP-Z5
*Depvar
      8,
*User Defined Field
*User Material, constants=6
1., 0.745,  0.15,  0.29,  0.15,    0.
**
** BOUNDARY CONDITIONS
**
** Name: Disp-BC-1 Type: Symmetry/Antisymmetry/Encastre
*Boundary
PART-1-1.ND-BEP-F, ENCASTRE
** Name: Por-BC-1 Type: Pore pressure
*Boundary
PART-1-1.ND-SURF_PP__PP__PP__PP_, 8, 8
**
** PREDEFINED FIELDS
**
** Name: Field-1   Type: Field
*Initial Conditions, type=FIELD, variable=1
PART-1-1.ND-CEP, 0.0025
** Name: Field-2   Type: Field
*Initial Conditions, type=FIELD, variable=1
PART-1-1.ND-AF, 0.00016
** Name: Field-3   Type: Field
*Initial Conditions, type=FIELD, variable=1
PART-1-1.ND-NP, 0.00016
** Name: Field-4   Type: Field
*Initial Conditions, type=FIELD, variable=2
PART-1-1.ND-CEP, 8.5
** Name: Field-5   Type: Field
*Initial Conditions, type=FIELD, variable=2
PART-1-1.ND-AF, 1.2
** Name: Field-6   Type: Field
*Initial Conditions, type=FIELD, variable=2
PART-1-1.ND-NP, 1.2
** Name: Field-7   Type: Field
*Initial Conditions, type=FIELD, variable=3
PART-1-1.ND-CEP, 4.
** Name: Field-8   Type: Field
*Initial Conditions, type=FIELD, variable=3
PART-1-1.ND-AF, 3.
** Name: Field-9   Type: Field
*Initial Conditions, type=FIELD, variable=3
PART-1-1.ND-NP, 4.
** Name: Field-10   Type: Field
*Initial Conditions, type=FIELD, variable=3
PART-1-1.ND-BEP, 0.05
** Name: Field-11   Type: Field
*Initial Conditions, type=FIELD, variable=4
PART-1-1.ND-CEP, 0.0025
** Name: Field-12   Type: Field
*Initial Conditions, type=FIELD, variable=4
PART-1-1.ND-AF, 0.00016
** Name: Field-13   Type: Field
*Initial Conditions, type=FIELD, variable=4
PART-1-1.ND-NP, 0.00016
** Name: IC-1   Type: Void ratio
*Initial Conditions, TYPE=RATIO
PART-1-1.ND-CEP, 4.
** Name: IC-2   Type: Void ratio
*Initial Conditions, TYPE=RATIO
PART-1-1.ND-AF, 3.
** Name: IC-3   Type: Void ratio
*Initial Conditions, TYPE=RATIO
PART-1-1.ND-NP, 4.
** Name: IC-4   Type: Void ratio
*Initial Conditions, TYPE=RATIO
PART-1-1.ND-BEP, 0.05
** ----------------------------------------------------------------
**
** STEP: Swelling
**
*Step, name=Swelling, nlgeom=YES, inc=1000
Free swelling
*Soils, consolidation, end=PERIOD, utol=5.
2000., 61200., 2000., 61200.,
**
** CONTROLS
**
*Controls, reset
*Controls, analysis=discontinuous
*Controls, parameters=line search
4, 4., 0.05, , 0.15
*Controls, parameters=field, field=displacement
0.075, 0.075, , , , , ,
*Controls, parameters=field, field=hydrostatic fluid pressure
0.075, 0.075, , , , , ,
*Controls, parameters=field, field=rotation
0.075, 0.075, , , , , ,
*Controls, parameters=field, field=pore fluid pressure
0.075, 0.075, , , , , ,
**
** OUTPUT REQUESTS
**
*Restart, write, frequency=0
**
** FIELD OUTPUT: F-Output-1
**
*Output, field
*Node Output
CF, POR, RF, U
**
** FIELD OUTPUT: F-Output-2
**
*Element Output, rebar, directions=YES
FLUVR, FLVEL, LE, RBANG, RBFOR, RBROT, S, VOIDR
**
** FIELD OUTPUT: F-Output-3
**
*Element Output, directions=YES
FLUVR, FLVEL, LE, S, SDV, VOIDR
**
** HISTORY OUTPUT: H-Output-1
**
*Output, history, variable=PRESELECT
*End Step
** ----------------------------------------------------------------
**
** STEP: Carga_noche
**
*Step, name=Carga_noche, nlgeom=YES, amplitude=RAMP, inc=1000
Load at rest time
*Soils, consolidation, end=PERIOD, utol=5.
2.5, 10., 0.0001, 10.,
**
** LOADS
**
** Name: SURFFORCE-1   Type: Pressure
*Dsload, op=NEW
SURF-1, P, 0.11
**
** CONTROLS
**
*Controls, reset
*Controls, analysis=discontinuous
*Controls, parameters=line search
4, 4., 0.05, , 0.15
*Controls, parameters=field, field=displacement
0.075, 0.075, , , , , ,
*Controls, parameters=field, field=hydrostatic fluid pressure
0.075, 0.075, , , , , ,
*Controls, parameters=field, field=rotation
0.075, 0.075, , , , , ,
*Controls, parameters=field, field=pore fluid pressure
0.075, 0.075, , , , , ,
**
** OUTPUT REQUESTS
**
*Restart, write, frequency=0
**
** FIELD OUTPUT: F-Output-4
**
*Output, field
*Node Output
CF, POR, RF, U
**
** FIELD OUTPUT: F-Output-5
**
*Element Output, rebar, directions=YES
FLUVR, FLVEL, LE, RBANG, RBFOR, RBROT, S, VOIDR
**
** FIELD OUTPUT: F-Output-6
**
*Element Output, directions=YES
FLUVR, FLVEL, LE, S, SDV, VOIDR
**
** HISTORY OUTPUT: H-Output-2
**
*Output, history, variable=PRESELECT
*End Step
** ----------------------------------------------------------------
**
** STEP: Creep_noche
**
*Step, name=Creep_noche, nlgeom=YES, inc=1000
*Soils, consolidation, end=PERIOD, utol=5.
5., 28790., 1., 28790.,
**
** LOADS
**
** Name: SURFFORCE-1   Type: Pressure
*Dsload, op=NEW
** Name: SURFFORCE-2   Type: Pressure
*Dsload, op=NEW, amplitude=AMP-1
SURF-1, P, 0.11
**
** CONTROLS
**
*Controls, reset
*Controls, analysis=discontinuous
*Controls, parameters=line search
4, 4., 0.05, , 0.15
*Controls, parameters=field, field=displacement
0.075, 0.075, , , , , ,
*Controls, parameters=field, field=hydrostatic fluid pressure
0.075, 0.075, , , , , ,
*Controls, parameters=field, field=rotation
0.075, 0.075, , , , , ,
*Controls, parameters=field, field=pore fluid pressure
0.075, 0.075, , , , , ,
**
** OUTPUT REQUESTS
**
*Restart, write, frequency=0
**
** FIELD OUTPUT: F-Output-7
**
*Output, field
*Node Output
CF, POR, RF, U
**
** FIELD OUTPUT: F-Output-8
**
*Element Output, directions=YES
FLUVR, FLVEL, LE, S, SDV, VOIDR
**
** HISTORY OUTPUT: H-Output-3
**
*Output, history, variable=PRESELECT
*End Step
** ----------------------------------------------------------------
**
** STEP: Carga_dia
**
*Step, name=Carga_dia, nlgeom=YES, amplitude=RAMP, inc=1000
*Soils, consolidation, end=PERIOD, utol=5.
0.1, 10., 0.0001, 10.,
**
** LOADS
**
** Name: SURFFORCE-2   Type: Pressure
*Dsload, op=NEW
** Name: SURFFORCE-3   Type: Pressure
*Dsload, op=NEW
SURF-1, P, 0.54
**
** OUTPUT REQUESTS
**
*Restart, write, frequency=0
**
** FIELD OUTPUT: F-Output-9
**
*Output, field
*Node Output
CF, POR, RF, U
**
** FIELD OUTPUT: F-Output-10
**
*Element Output, rebar, directions=YES
FLUVR, FLVEL, LE, RBANG, RBFOR, RBROT, S, VOIDR
**
** FIELD OUTPUT: F-Output-11
**
*Element Output, directions=YES
FLUVR, FLVEL, LE, S, SDV, VOIDR
**
** HISTORY OUTPUT: H-Output-4
**
*Output, history, variable=PRESELECT
*End Step
** ----------------------------------------------------------------
**
** STEP: Creep_dia
**
*Step, name=Creep_dia, nlgeom=YES, inc=1000
*Soils, consolidation, end=PERIOD, utol=5.
5., 57590., 0.001, 57590.,
**
** LOADS
**
** Name: SURFFORCE-3   Type: Pressure
*Dsload, op=NEW
** Name: SURFFORCE-4   Type: Pressure
*Dsload, op=NEW, amplitude=AMP-2
SURF-1, P, 0.54
**
** OUTPUT REQUESTS
**
*Restart, write, frequency=0
**
** FIELD OUTPUT: F-Output-12
**
*Output, field
*Node Output
CF, POR, RF, U
**
** FIELD OUTPUT: F-Output-13
**
*Element Output, rebar, directions=YES
FLUVR, FLVEL, LE, RBANG, RBFOR, RBROT, S, VOIDR
**
** FIELD OUTPUT: F-Output-14
**
*Element Output, directions=YES
FLUVR, FLVEL, LE, S, SDV, VOIDR
**
** HISTORY OUTPUT: H-Output-5
**
*Output, history, variable=PRESELECT
*End Step
